vBAT == vHA/k
vBAT + δvBAT == (vHA + δvHA)/(k + δk)
vBAT + δvBAT == vHA/k*((1 + δvHA/vHA)/(1 + δk/k))
(1 + δvHA/vHA)*(1 - δvk/k)
(3.6*(1 - (1 + 0.005/1.2)/(1 - 0.0029/0.328))) = -0.047247
δvHA/vHA + δvk/k
(0.005/1.2 + 0.0029/0.328)*3.6 = 0.0468293
(1 + 0.0753)*3.7 = 3.97861
vHA == vBAT*k
0.0326 - 0.0336 = -0.001
vBAT*(k + δk) + δvADC
vBAT*δk + dvADC
4.4*0.0029 + 0.010 = 0.02276
